*Heading
** Job name: Converged_55 Model name: Mesh_study
** Generated by: Abaqus/CAE 2019
*Preprint, echo=NO, model=NO, history=NO, contact=NO
**
** PARTS
**
*Part, name=membrane
*End Part
**
**
** ASSEMBLY
**
*Assembly, name=Assembly
**
*Instance, name=membrane-1, part=membrane
*Node
      1,  -19.6572666,    9.5255537,           0.
      2,  -20.4386349,   8.75848293,           0.
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*Element, type=S3
 1, 1282, 1205,  135
 2, 2199, 1238, 1052
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*Element, type=S4R
  74,  621,  768,  853,  620
  75,  138,    6,  513,  622
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*Nset, nset=Set-1, generate
    1,  2413,     1
*Elset, elset=Set-1, generate
    1,  2343,     1
*Nset, nset=Set-2, generate
    1,  2413,     1
*Elset, elset=Set-2, generate
    1,  2343,     1
** Section: Section-1
*Shell Section, elset=Set-2, material=membrane
0.0075312555578495675, 5
*End Instance
**
*Nset, nset=Set-1, instance=membrane-1
   8,   9,  10,  11,  12,  13
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*Elset, elset=Set-1, instance=membrane-1
  124,  125,  126,  128,  129,  130
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*Nset, nset=Set-2, instance=membrane-1
   8,   9,  10,  11,  12,  13
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*Elset, elset=Set-2, instance=membrane-1
  124,  125,  126,  128,  129,  130
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*End Assembly
**
** MATERIALS
**
*Material, name=membrane
*Density
 1.23e-09,
*Elastic
 1144.64, 0.261954
**
** BOUNDARY CONDITIONS
**
** Name: BC-2 Type: Symmetry/Antisymmetry/Encastre
*Boundary
Set-2, ENCASTRE
** ----------------------------------------------------------------
**
** STEP: Step-1
**
*Step, name=Step-1, nlgeom=NO, perturbation
*Frequency, eigensolver=Lanczos, sim, acoustic coupling=on, normalization=mass
10, , , , ,
**
** BOUNDARY CONDITIONS
**
** Name: BC-1 Type: Symmetry/Antisymmetry/Encastre
*Boundary
Set-1, ENCASTRE
**
** OUTPUT REQUESTS
**
*Restart, write, frequency=0
**
** FIELD OUTPUT: F-Output-1
**
*Output, field, variable=PRESELECT
*End Step
